// SBML level 2 version 4

model ModelHistoneZheng()

  // Compartments:
  compartment default = 1;

  // Species:
  species K27me0K36me0 in default = 0.00417725;
  species K27me0K36me1 in default = 0.01021047;
  species K27me1K36me0 in default = 0.001654128;
  species K27me0K36me2 in default = 0.1696903;
  species K27me1K36me1 in default = 0.007832819;
  species K27me2K36me0 in default = 0.006327448;
  species K27me0K36me3 in default = 0.05049352;
  species K27me1K36me2 in default = 0.5942498;
  species K27me2K36me1 in default = 0.01438963;
  species K27me3K36me0 in default = 0.003301684;
  species K27me1K36me3 in default = 0.1027487;
  species K27me2K36me2 in default = 0.02633726;
  species K27me3K36me1 in default = 0.00250831;
  species K27me2K36me3 in default = 0.004718314;
  species K27me3K36me2 in default = 0.001360416;

  // Parameters:
  inflowp = 0.03091608;
  k00_01 = 3.079775;
  k00_10 = 4.290397;
  k01_00 = 1e-5;
  k01_02 = 1.835973;
  k01_11 = 1e-5;
  k02_01 = 0.03651916;
  k02_03 = 0.01722192;
  k02_12 = 0.02585352;
  k03_02 = 1e-5;
  k03_13 = 0.02697085;
  k10_00 = 1e-5;
  k10_11 = 1000;
  k10_20 = 1e-5;
  k11_01 = 1e-5;
  k11_10 = 208.8976;
  k11_12 = 7.204773;
  k11_21 = 0.3338643;
  k12_02 = 1e-5;
  k12_11 = 0.06970103;
  k12_13 = 0.01897103;
  k12_22 = 0.003717186;
  k13_03 = 1e-5;
  k13_12 = 0.1034813;
  k13_23 = 1e-5;
  k20_10 = 1e-5;
  k20_21 = 1e-5;
  k20_30 = 0.3120454;
  k21_11 = 1e-5;
  k21_20 = 0.1508133;
  k21_22 = 1e-5;
  k21_31 = 1e-5;
  k22_12 = 0.06936023;
  k22_21 = 1e-5;
  k22_23 = 0.05014633;
  k22_32 = 1e-5;
  k23_13 = 0.2492046;
  k23_22 = 1e-5;
  k30_20 = 1e-5;
  k30_31 = 0.5670948;
  k31_21 = 1e-5;
  k31_30 = 1e-5;
  k31_32 = 0.7155925;
  k32_22 = 1.288664;
  k32_31 = 1e-5;
  noise = 0.001810468;

  // Assignment rules:
  inflow := inflowp - inflowp*piecewise(0, time < 0, 1);
  K27me0K36me0_obs := K27me0K36me0/(K27me0K36me0 + K27me0K36me1 + K27me0K36me2 + K27me0K36me3 + K27me1K36me0 + K27me1K36me1 + K27me1K36me2 + K27me1K36me3 + K27me2K36me0 + K27me2K36me1 + K27me2K36me2 + K27me2K36me3 + K27me3K36me0 + K27me3K36me1 + K27me3K36me2);
  K27me0K36me1_obs := K27me0K36me1/(K27me0K36me0 + K27me0K36me1 + K27me0K36me2 + K27me0K36me3 + K27me1K36me0 + K27me1K36me1 + K27me1K36me2 + K27me1K36me3 + K27me2K36me0 + K27me2K36me1 + K27me2K36me2 + K27me2K36me3 + K27me3K36me0 + K27me3K36me1 + K27me3K36me2);
  K27me1K36me0_obs := K27me1K36me0/(K27me0K36me0 + K27me0K36me1 + K27me0K36me2 + K27me0K36me3 + K27me1K36me0 + K27me1K36me1 + K27me1K36me2 + K27me1K36me3 + K27me2K36me0 + K27me2K36me1 + K27me2K36me2 + K27me2K36me3 + K27me3K36me0 + K27me3K36me1 + K27me3K36me2);
  K27me0K36me2_obs := K27me0K36me2/(K27me0K36me0 + K27me0K36me1 + K27me0K36me2 + K27me0K36me3 + K27me1K36me0 + K27me1K36me1 + K27me1K36me2 + K27me1K36me3 + K27me2K36me0 + K27me2K36me1 + K27me2K36me2 + K27me2K36me3 + K27me3K36me0 + K27me3K36me1 + K27me3K36me2);
  K27me1K36me1_obs := K27me1K36me1/(K27me0K36me0 + K27me0K36me1 + K27me0K36me2 + K27me0K36me3 + K27me1K36me0 + K27me1K36me1 + K27me1K36me2 + K27me1K36me3 + K27me2K36me0 + K27me2K36me1 + K27me2K36me2 + K27me2K36me3 + K27me3K36me0 + K27me3K36me1 + K27me3K36me2);
  K27me2K36me0_obs := K27me2K36me0/(K27me0K36me0 + K27me0K36me1 + K27me0K36me2 + K27me0K36me3 + K27me1K36me0 + K27me1K36me1 + K27me1K36me2 + K27me1K36me3 + K27me2K36me0 + K27me2K36me1 + K27me2K36me2 + K27me2K36me3 + K27me3K36me0 + K27me3K36me1 + K27me3K36me2);
  K27me0K36me3_obs := K27me0K36me3/(K27me0K36me0 + K27me0K36me1 + K27me0K36me2 + K27me0K36me3 + K27me1K36me0 + K27me1K36me1 + K27me1K36me2 + K27me1K36me3 + K27me2K36me0 + K27me2K36me1 + K27me2K36me2 + K27me2K36me3 + K27me3K36me0 + K27me3K36me1 + K27me3K36me2);
  K27me1K36me2_obs := K27me1K36me2/(K27me0K36me0 + K27me0K36me1 + K27me0K36me2 + K27me0K36me3 + K27me1K36me0 + K27me1K36me1 + K27me1K36me2 + K27me1K36me3 + K27me2K36me0 + K27me2K36me1 + K27me2K36me2 + K27me2K36me3 + K27me3K36me0 + K27me3K36me1 + K27me3K36me2);
  K27me2K36me1_obs := K27me2K36me1/(K27me0K36me0 + K27me0K36me1 + K27me0K36me2 + K27me0K36me3 + K27me1K36me0 + K27me1K36me1 + K27me1K36me2 + K27me1K36me3 + K27me2K36me0 + K27me2K36me1 + K27me2K36me2 + K27me2K36me3 + K27me3K36me0 + K27me3K36me1 + K27me3K36me2);
  K27me3K36me0_obs := K27me3K36me0/(K27me0K36me0 + K27me0K36me1 + K27me0K36me2 + K27me0K36me3 + K27me1K36me0 + K27me1K36me1 + K27me1K36me2 + K27me1K36me3 + K27me2K36me0 + K27me2K36me1 + K27me2K36me2 + K27me2K36me3 + K27me3K36me0 + K27me3K36me1 + K27me3K36me2);
  K27me1K36me3_obs := K27me1K36me3/(K27me0K36me0 + K27me0K36me1 + K27me0K36me2 + K27me0K36me3 + K27me1K36me0 + K27me1K36me1 + K27me1K36me2 + K27me1K36me3 + K27me2K36me0 + K27me2K36me1 + K27me2K36me2 + K27me2K36me3 + K27me3K36me0 + K27me3K36me1 + K27me3K36me2);
  K27me2K36me2_obs := K27me2K36me2/(K27me0K36me0 + K27me0K36me1 + K27me0K36me2 + K27me0K36me3 + K27me1K36me0 + K27me1K36me1 + K27me1K36me2 + K27me1K36me3 + K27me2K36me0 + K27me2K36me1 + K27me2K36me2 + K27me2K36me3 + K27me3K36me0 + K27me3K36me1 + K27me3K36me2);
  K27me3K36me1_obs := K27me3K36me1/(K27me0K36me0 + K27me0K36me1 + K27me0K36me2 + K27me0K36me3 + K27me1K36me0 + K27me1K36me1 + K27me1K36me2 + K27me1K36me3 + K27me2K36me0 + K27me2K36me1 + K27me2K36me2 + K27me2K36me3 + K27me3K36me0 + K27me3K36me1 + K27me3K36me2);
  K27me2K36me3_obs := K27me2K36me3/(K27me0K36me0 + K27me0K36me1 + K27me0K36me2 + K27me0K36me3 + K27me1K36me0 + K27me1K36me1 + K27me1K36me2 + K27me1K36me3 + K27me2K36me0 + K27me2K36me1 + K27me2K36me2 + K27me2K36me3 + K27me3K36me0 + K27me3K36me1 + K27me3K36me2);
  K27me3K36me2_obs := K27me3K36me2/(K27me0K36me0 + K27me0K36me1 + K27me0K36me2 + K27me0K36me3 + K27me1K36me0 + K27me1K36me1 + K27me1K36me2 + K27me1K36me3 + K27me2K36me0 + K27me2K36me1 + K27me2K36me2 + K27me2K36me3 + K27me3K36me0 + K27me3K36me1 + K27me3K36me2);

  // Reactions:
  v1_v_0: => K27me0K36me0; inflow;
  v2_v_1: K27me0K36me0 => K27me0K36me1; K27me0K36me0*k00_01;
  v3_v_2: K27me0K36me1 => K27me0K36me0; K27me0K36me1*k01_00;
  v4_v_3: K27me0K36me0 => K27me1K36me0; K27me0K36me0*k00_10;
  v5_v_4: K27me1K36me0 => K27me0K36me0; K27me1K36me0*k10_00;
  v6_v_5: K27me1K36me0 => K27me1K36me1; K27me1K36me0*k10_11;
  v7_v_6: K27me1K36me1 => K27me1K36me0; K27me1K36me1*k11_10;
  v8_v_7: K27me0K36me1 => K27me1K36me1; K27me0K36me1*k01_11;
  v9_v_8: K27me1K36me1 => K27me0K36me1; K27me1K36me1*k11_01;
  v10_v_9: K27me0K36me1 => K27me0K36me2; K27me0K36me1*k01_02;
  v11_v_10: K27me0K36me2 => K27me0K36me1; K27me0K36me2*k02_01;
  v12_v_11: K27me1K36me0 => K27me2K36me0; K27me1K36me0*k10_20;
  v13_v_12: K27me2K36me0 => K27me1K36me0; K27me2K36me0*k20_10;
  v14_v_13: K27me0K36me2 => K27me1K36me2; K27me0K36me2*k02_12;
  v15_v_14: K27me1K36me2 => K27me0K36me2; K27me1K36me2*k12_02;
  v16_v_15: K27me2K36me0 => K27me2K36me1; K27me2K36me0*k20_21;
  v17_v_16: K27me2K36me1 => K27me2K36me0; K27me2K36me1*k21_20;
  v18_v_17: K27me0K36me2 => K27me0K36me3; K27me0K36me2*k02_03;
  v19_v_18: K27me0K36me3 => K27me0K36me2; K27me0K36me3*k03_02;
  v20_v_19: K27me2K36me0 => K27me3K36me0; K27me2K36me0*k20_30;
  v21_v_20: K27me3K36me0 => K27me2K36me0; K27me3K36me0*k30_20;
  v22_v_21: K27me1K36me1 => K27me1K36me2; K27me1K36me1*k11_12;
  v23_v_22: K27me1K36me2 => K27me1K36me1; K27me1K36me2*k12_11;
  v24_v_23: K27me1K36me1 => K27me2K36me1; K27me1K36me1*k11_21;
  v25_v_24: K27me2K36me1 => K27me1K36me1; K27me2K36me1*k21_11;
  v26_v_25: K27me1K36me2 => K27me2K36me2; K27me1K36me2*k12_22;
  v27_v_26: K27me2K36me2 => K27me1K36me2; K27me2K36me2*k22_12;
  v28_v_27: K27me2K36me1 => K27me2K36me2; K27me2K36me1*k21_22;
  v29_v_28: K27me2K36me2 => K27me2K36me1; K27me2K36me2*k22_21;
  v30_v_29: K27me2K36me2 => K27me2K36me3; K27me2K36me2*k22_23;
  v31_v_30: K27me2K36me3 => K27me2K36me2; K27me2K36me3*k23_22;
  v32_v_31: K27me2K36me2 => K27me3K36me2; K27me2K36me2*k22_32;
  v33_v_32: K27me3K36me2 => K27me2K36me2; K27me3K36me2*k32_22;
  v34_v_33: K27me3K36me0 => K27me3K36me1; K27me3K36me0*k30_31;
  v35_v_34: K27me3K36me1 => K27me3K36me0; K27me3K36me1*k31_30;
  v36_v_35: K27me0K36me3 => K27me1K36me3; K27me0K36me3*k03_13;
  v37_v_36: K27me1K36me3 => K27me0K36me3; K27me1K36me3*k13_03;
  v38_v_37: K27me1K36me2 => K27me1K36me3; K27me1K36me2*k12_13;
  v39_v_38: K27me1K36me3 => K27me1K36me2; K27me1K36me3*k13_12;
  v40_v_39: K27me2K36me1 => K27me3K36me1; K27me2K36me1*k21_31;
  v41_v_40: K27me3K36me1 => K27me2K36me1; K27me3K36me1*k31_21;
  v42_v_41: K27me3K36me1 => K27me3K36me2; K27me3K36me1*k31_32;
  v43_v_42: K27me3K36me2 => K27me3K36me1; K27me3K36me2*k32_31;
  v44_v_43: K27me1K36me3 => K27me2K36me3; K27me1K36me3*k13_23;
  v45_v_44: K27me2K36me3 => K27me1K36me3; K27me2K36me3*k23_13;
  v46_v_45: K27me0K36me0 => ; K27me0K36me0*inflow;
  v47_v_46: K27me0K36me1 => ; K27me0K36me1*inflow;
  v48_v_47: K27me1K36me0 => ; K27me1K36me0*inflow;
  v49_v_48: K27me0K36me2 => ; K27me0K36me2*inflow;
  v50_v_49: K27me1K36me1 => ; K27me1K36me1*inflow;
  v51_v_50: K27me2K36me0 => ; K27me2K36me0*inflow;
  v52_v_51: K27me0K36me3 => ; K27me0K36me3*inflow;
  v53_v_52: K27me1K36me2 => ; K27me1K36me2*inflow;
  v54_v_53: K27me2K36me1 => ; K27me2K36me1*inflow;
  v55_v_54: K27me3K36me0 => ; K27me3K36me0*inflow;
  v56_v_55: K27me1K36me3 => ; K27me1K36me3*inflow;
  v57_v_56: K27me2K36me2 => ; K27me2K36me2*inflow;
  v58_v_57: K27me3K36me1 => ; K27me3K36me1*inflow;
  v59_v_58: K27me2K36me3 => ; K27me2K36me3*inflow;
  v60_v_59: K27me3K36me2 => ; K27me3K36me2*inflow;

  // Unit definitions:
  unit time = 3600 second;
end
